#
# use -var mofpath <mof-path>
#
# TEST FOR USING NVE

variable simTemp equal 298
variable dt equal 1.0
variable randomSeed equal 123123
variable mofAtomTypes equal 4

units           real
atom_style      full
boundary        p p p

pair_style      lj/cut/coul/long 12.500
bond_style      harmonic
kspace_style    pppm 0.0001

dielectric      1.0
pair_modify     tail yes mix arithmetic

read_data ${mofpath} group mof extra/atom/types 2
read_data co2.lmpdat group gas add append offset ${mofAtomTypes} 0 0 0 0
velocity gas create ${simTemp} ${randomSeed} dist gaussian
group gasCenters type $(v_mofAtomTypes + 2) # use center carbon for GK

neigh_modify exclude molecule/intra mof
neigh_modify exclude molecule/inter mof

# No pair potentials between atoms in a gas. Probably redundant.
neigh_modify exclude molecule/intra gas

# No pair potentials between different gas molecules. This is so that we can simulate X gas
# molecules in the same simulation, without them interacting with each other (assuming ideal gas).
# neigh_modify exclude molecule/inter gas

info groups

print ""
print "** Setup thermo and velocity ** "
compute gastemp gas temp
thermo_style custom step c_gastemp temp press etotal
thermo         100
thermo_modify  flush yes
timestep        0.1 #fs
fix integrate_fn gas rigid/nvt/small molecule temp ${simTemp} ${simTemp} $(v_dt * 100)
velocity gas create ${simTemp} ${randomSeed} dist gaussian
run 0
velocity gas scale ${simTemp}

print ""
print "** NVT 0.1 fs equilibration ** "
run           10000
unfix integrate_fn

print ""
print "** NVT 1.0 fs equilibration ** "
timestep        ${dt} #fs
fix integrate_fn gas rigid/nvt/small molecule temp ${simTemp} ${simTemp} $(v_dt * 100)
run           200000
unfix integrate_fn

print ""
print "** NVE EQUILIBRATION ** "
reset_timestep 0
fix d_int_rigid gas rigid/nve/small molecule
restart       50000 nve-eq.*.restart
run           50000
unfix d_int_rigid

print ""
print "** NVE RUN ** "
reset_timestep 0

# VACF methodology from http://lammps.sandia.gov/doc/compute_vacf.html
compute vacfGas gasCenters vacf
fix             vacfVector all vector 1000 c_vacfGas[4]
variable        diffusivity equal v_dt*trap(f_vacfVector)

compute msd gasCenters msd
thermo_style custom step c_gastemp temp etotal c_vacfGas[4] v_diffusivity c_msd[4]

# methodology from Samir (for MSD and VACF)
dump trajectory_dump gas custom/gz 1000 gas.lammpstrj.gz id type mol mass xu yu zu

thermo         1000
thermo_modify flush yes
fix d_int_rigid gas rigid/nve/small molecule
restart       10000000 nve.*.restart
run           10000000
